dl := 0.001
lw := 1/(2*sqrt(ln(2)))
l0 := 655
nump := 400
tw := 50
lmin := 650
lmax := 660
nums := (lmax - lmin)/dl
Pulse :=
    for i ∈ 0 .. nump
        I[i] ← exp(-((i - nump/2)/tw)^2)
    I
Spectrum :=
    for i ∈ 0 .. nums
        I[i] ← exp(-((lmin + dl*i - l0)/lw)^2)
    I
lamda :=
    for i ∈ 0 .. nums
        l[i] ← lmin + dl*i
    l
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Pulse = [
    1.12535e-7; 1.32008e-7; 1.54728e-7; 1.81212e-7; 2.12059e-7; 2.4796e-7; 2.89706e-7; 3.3821e-7; 3.94518e-7; 4.59834e-7
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]
Spectrum =  # no stored result
lamda =  # no stored result
0.185*2.54 = 0.4699
0.145*2.54 = 0.3683
nm := 10^-9
μm := 10^-6
λ := 655*nm
n1 := 1.5
k := 2*π/λ
a := 25*μm
M := 6
g := 3
hmn(m, D, σ, Δβ) := 1/8*(n1*k*a)^2*(m/M)^(4/(g + 2))*Δβ^4*σ^2*D/sqrt(2)*e^(-(D*Δβ)^2/4)
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27^2 = 729
fe(Δβ, D) := e^(-(D*Δβ)^2/4)
